// COMSOL Multiphysics 5.4.0.388 model "lab2.mph"
// Outline of the model tree
// Components: comp1 "Task 1. Wave equation", comp2 "Task 2. Heat Equation"

Parameters
  a = 0.45
  b = 0
  c = -1.05
  f = -0.5
  q = 2

Geometry
  geom1 "Geometry 1" [comp1] (1D, length unit m)
    i1: Interval | coord = 0, 1
    fin: Finalize "Form Union"
  geom2 "Geometry 2" [comp2] (1D, length unit m)
    i1: Interval
    fin: Finalize "Form Union"

Physics
  waeq: WaveEquation "Task 1. Wave Equation" [geom1] on all domains
    dependent variable u
    weq1: WaveEquation (default) | f = (a*t+b)/(1+c^2/x^2)
    zflx1: ZeroFluxBoundary "Zero Flux 1" (default)
    init1: init "Initial Values 1" (default) | u = x^2-x+f; ut = f^2+exp(q*x)
    dir1: DirichletBoundary "Left Dirichlet Boundary" on boundaries 1 | r = f+sin(pi * t); useDirichletCondition = 1
    dir2: DirichletBoundary "Right Dirichlet Boundary" on boundaries 2 | r = f+t^3
  hteq2: HeatEquation "Task 2. Heat Equation" [geom2] on all domains
    dependent variable u2
    hteq1: HeatEquation (default) | c = 0.5
    zflx1: ZeroFluxBoundary "Zero Flux 1" (default)
    init1: init "Initial Values 1" (default) | u2t = 1
    dir1: DirichletBoundary "Left Dirichlet Boundary" on boundaries 1
      r = -2*t
      useDirichletCondition = 1
      constraintType = unidirectionalConstraint
      constraintMethod = elemental
    dir2: DirichletBoundary "Right Dirichlet Boundary" on boundaries 2
      r = 1-2*t
      useDirichletCondition = 1
      constraintType = unidirectionalConstraint
      constraintMethod = elemental

Mesh
  mesh1 "Mesh 1" [geom1]
    size: MeshSizeDefault | hmax = 0.5; hgrad = 1
    edg1: Edge on entire geometry
  mesh2 "Mesh 2" [geom2]
    size: MeshSizeDefault | hmax = 0.1; hgrad = 1
    edg1: Edge on domains 1

Studies
  std1 "Task 1. Wave equation study"
    time: Transient "Time Dependent" | tlist = 0.0, 0.5; usertol = on; rtol = 0.05; solve for = {waeq}
  std2 "Task 2. Heat equation study"
    time: Transient "Time Dependent" | tlist = 0, 0.1; usertol = on; rtol = 0.001; solve for = {hteq2}

Solver configurations
  sol1 "Solution 1" (study std1)
    v1: Variables "Dependent Variables 1"
    t1: Time "Time-Dependent Solver 1" | tlist = 0.0, 0.5
      dDef: Direct
      fc1: FullyCoupled | linsolver = dDef
  sol2 "Solution 2" (study std2)
    v1: Variables "Dependent Variables 1"
    t1: Time "Time-Dependent Solver 1" | tlist = 0, 0.1
      dDef: Direct
      fc1: FullyCoupled | linsolver = dDef

Datasets
  dset1: Solution | solution = sol1
  dset2: Solution | solution = sol2
  dset3: Solution | solution = sol2

Plots
  pg1: PlotGroup1D "Task 1. Wave equation result" | data = dset1
    lngr1: LineGraph on all domains | expr = u; xdata = expr; xdataexpr = x
  pg2: PlotGroup1D "Task 2. Heat equation result" | data = dset3
    lngr1: LineGraph on all domains | expr = u2; xdata = expr; xdataexpr = x